clear
variable dump_file string "/app/project/out/lammps_tmp_C-2158988-7926-291/trj_lammps0000019bv52wpp.bin"
variable data_file string "/app/project/out/lammps_tmp_C-2158988-7926-291/data_lammps000001fg4483t5"
atom_style atomic
units metal
boundary p p p
atom_modify sort 0 0.0

read_data /app/project/out/lammps_tmp_C-2158988-7926-291/data_lammps000001fg4483t5

### interactions
pair_style quip
pair_coeff * * Carbon_GAP_20.xml "IP GAP" 1
mass 1 12.011000

### run
fix fix_nve all nve
dump dump_all all custom 1 /app/project/out/lammps_tmp_C-2158988-7926-291/trj_lammps0000019bv52wpp.bin id type x y z vx vy vz fx fy fz
thermo_style custom step temp press cpu pxx pyy pzz pxy pxz pyz ke pe etotal vol lx ly lz atoms
thermo_modify flush yes format float %23.16g
thermo 1
run 0
print "__end_of_ase_invoked_calculation__"
log /dev/stdout
